*Heading
** Job name: Job_TamL_vonM_2D Model name: CTS_2D
** Generated by: Abaqus/CAE 2022
*Preprint, echo=NO, model=NO, history=NO, contact=NO
**
** PARTS
**
*Part, name=L
*Node
      1,           0.,         250.
      2,         250.,         250.
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*Element, type=CPE4
   1,  297,   12,   13,  296
   2,  306,  132,  133,  304
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*Nset, nset=Set-1, generate
    1,  2373,     1
*Elset, elset=Set-1, generate
    1,  2307,     1
** Section: Section-1-ALL
*Solid Section, elset=Set-1, material=MORTOR
10.,
*End Part
**
**
** ASSEMBLY
**
*Assembly, name=Assembly
**
*Instance, name=L-1, part=L
*End Instance
**
*Nset, nset=Bienduoi, instance=L-1
   6,   7, 163, 164, 165, 166, 167, 168, 169, 170, 171
*Elset, elset=Bienduoi, instance=L-1
 1413, 1481, 1483, 1490, 2136, 2167, 2249, 2251, 2256, 2257
*Nset, nset=Luc, instance=L-1
 3,
*Nset, nset=Set-3, instance=L-1
   6,   7, 163, 164, 165, 166, 167, 168, 169, 170, 171
*Elset, elset=Set-3, instance=L-1
 1413, 1481, 1483, 1490, 2136, 2167, 2249, 2251, 2256, 2257
*Nset, nset=Set-4, instance=L-1
 3,
*End Assembly
**
** MATERIALS
**
*Material, name=MORTOR
*Density
1.,
*Depvar
      3,
*User Material, constants=4, unsymm
25850.,   0.18,    10., 0.0001
**
** BOUNDARY CONDITIONS
**
** Name: BC-4 Type: Displacement/Rotation
*Boundary
Set-3, 1, 1
Set-3, 2, 2
** ----------------------------------------------------------------
**
** STEP: Step-2
**
*Step, name=Step-2, nlgeom=YES, inc=1000
*Static, stabilize=0.0002, allsdtol=0.05, continue=NO
0.001, 1., 1e-06, 0.01
**
** BOUNDARY CONDITIONS
**
** Name: BC-2 Type: Displacement/Rotation
*Boundary
Luc, 2, 2, 0.8
**
** OUTPUT REQUESTS
**
*Restart, write, frequency=0
**
** FIELD OUTPUT: F-Output-1
**
*Output, field
*Node Output
RF, U
*Element Output, directions=YES
E, S, SDV
*Output, history, frequency=0
*End Step
